*Heading
*Node
1,0.0000000000000,-0.5000000000000
2,0.2500000000000,-0.5000000000000
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*User element,type=U1,nodes=4,properties=8,coordinates=2,variables=44
1,2
*Element, type=U1
1,19,20,53,52
2,20,21,54,53
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*User element,type=U2,nodes=8,properties=8,coordinates=2,variables=44
1,2
*Element, type=U2
1873,15,16,49,48,2077,2078,2083,2082
1874,16,17,50,49,2078,2079,2084,2083
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*User element,type=U3,nodes=8,properties=8,coordinates=2,variables=44
1,2
*Element, type=U3
1889,236,237,328,327,2077,2078,2083,2082
1890,237,238,329,328,2077,2078,2083,2082
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*Element, type=CPE4
2289,19,20,53,52
2290,20,21,54,53
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*Elset, elset=ALLE, generate
1,2288,1
*Nset, nset=bottom
1,34,67,100,133,166
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*Elset, elset=_load-11_S2
2302,2316,2330,2344
*Surface, type=ELEMENT, name=load-11
_load-11_S2, S2
*Uel property, elset=ALLE
200000,0.3,30,0,30,0.001,30,0.1
*initial conditions,type=solution
ALLE, 0.0, 0.0, 0.0, 0.0, 0.0, 0.0, 0.0
0.0, 0.0, 0.0, 0.0, 0.0, 0.0, 0.0, 0.0
0.0, 0.0, 0.0, 0.0, 0.0, 0.0, 0.0, 0.0
0.0, 0.0, 0.0, 0.0, 0.0, 0.0, 0.0, 0.0
0.0, 0.0, 0.0, 0.0, 0.0, 0.0, 0.0,0.0
0.0, 0.0, 0.0, 0.0, 0.0
**initial conditions,type=stress,geostatic
**ALLE,0,-0.45,-1,-0,5,0.5,0.5
*Elset, elset=dummy1
2289,2290,2291,2292,2293,2294
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*Elset, elset=dummy2
2345,2346,2347,2348,2349,2350,2351,2352,2353,2354,2355,2356,2357,2358,2359,2360
*Elset, elset=dummy3
2361,2362,2363,2364,2365,2366
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*Elset, elset=dummy4
3761,3762,3763,3764,3765,3766
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*Elset, elset=dummy5
4161,4162,4163,4164,4165,4166,4167,4168,4169,4170,4171,4172,4173,4174,4175,4176
*Solid Section, elset=dummy1, material=mat1
1.0
*Solid Section, elset=dummy2, material=mat1
1.0
*Solid Section, elset=dummy3, material=mat1
1.0
*Solid Section, elset=dummy4, material=mat1
1.0
*Solid Section, elset=dummy5, material=mat1
1.0
*Material, name=mat1
*Elastic
1e-16, 0.3
*user output variables
12,
*Boundary
bottom, 1, 1
bottom, 2, 2
** ----------------------------------------------------------------
** STEP: Step-1
**
*Step, name=Step-1, nlgeom=NO
*Static
1., 1., 1e-05, 1.
** Name: Load-1   Type: Surface traction
*Dsload
load-11, TRSHRNU, 1., 0., -1., 0.
** OUTPUT REQUESTS
**
*Restart, write, frequency=0
*NODE PRINT,FREQ=1
U,CF
*Output, field
*element output, elset=dummy1
 uvarm,
*element output, elset=dummy2
 uvarm,
*element output, elset=dummy3
 uvarm,
*element output, elset=dummy4
 uvarm,
*Node Output
CF, RF, U
*Element Output, elset=dummy1
S,E
*Element Output, elset=dummy2
S,E
*Element Output, elset=dummy3
S,E
*Element Output, elset=dummy4
S,E
*Output, history, variable=PRESELECT
*End Step
